*Heading
** Job name: Job-1 Model name: Model-1
** Generated by: Abaqus/CAE 2019
*Preprint, echo=NO, model=NO, history=NO, contact=NO
**
** PARTS
**
*Part, name=Part-1
*Node
      1,          12.,          0.5
      2,           0.,          0.5
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*Element, type=CPE4
   1,    1,    9, 1119,  504
   2,    9,   10, 1120, 1119
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*Nset, nset=Set-1, generate
     1,  19521,      1
*Elset, elset=Set-1, generate
     1,  19200,      1
*Nset, nset=horiz_lines
    1,    2,    3,    4,    5,    6
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*Elset, elset=horiz_lines
     1,     2,     3,     4,     5,     6
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*Nset, nset=vert_lines_coarse
    1,    2,    3,    4,    5,    6
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*Elset, elset=vert_lines_coarse
     1,   240,   241,   480,   481,   720
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*Nset, nset=vert_lines_fine
   1,   2,   5,   6, 744, 745
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*Elset, elset=vert_lines_fine
 2401, 2640, 2641, 2880, 2881, 3120
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** Section: Section-1
*Solid Section, elset=Set-1, material=Material-1
1.,
*End Part
**
**
** ASSEMBLY
**
*Assembly, name=Assembly
**
*Instance, name=Part-1-1, part=Part-1
*End Instance
**
*Nset, nset=lower, instance=Part-1-1
   3,   4, 257, 258, 259, 260
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*Elset, elset=lower, instance=Part-1-1, generate
 2161,  2400,     1
*Nset, nset=midnode_lower, instance=Part-1-1
 376,
*Nset, nset=sides, instance=Part-1-1
    1,    2,    3,    4,    5,    6
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*Elset, elset=sides, instance=Part-1-1
     1,   240,   241,   480,   481,   720
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*End Assembly
**
** MATERIALS
**
*Material, name=Material-1
**
** BOUNDARY CONDITIONS
**
** Name: BC-1 Type: Displacement/Rotation
*Boundary
lower, 2, 2
** Name: BC-2 Type: Displacement/Rotation
*Boundary
midnode_lower, 1, 1
